*Heading
** Job name: Job_fin Model name: Model-1
** Generated by: Abaqus/CAE 2022
*Preprint, echo=NO, model=NO, history=NO, contact=NO
**
** PARTS
**
*Part, name=boom_1
*Node
      1,           0.,           0.,           0.
      2,   5.00433302,           0.,           0.
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*Element, type=B31
  1,   1,   2
  2,   2,   3
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*Nset, nset=boom1, generate
   1,  284,    1
*Elset, elset=boom1, generate
   1,  283,    1
*Nset, nset=Set-4, generate
   1,  284,    1
*Elset, elset=Set-4, generate
   1,  283,    1
*Orientation, name=Ori-2
1., 0., 0., 0., 1., 0.
1, 0.
** Section: Section_boom  Profile: profile
*Beam Section, elset=boom1, material=Aluminium_beam, temperature=GRADIENTS, section=CIRC
13.8198
0.,0.,-1.
*End Part
**
*Part, name=boom_2
*Node
      1,           0.,           0.,           0.
      2,   4.99370909,           0.,           0.
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*Element, type=B31
  1,   1,   2
  2,   2,   3
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*Nset, nset=boom_2, generate
   1,  295,    1
*Elset, elset=boom_2, generate
   1,  294,    1
*Nset, nset=Set-5, generate
   1,  295,    1
*Elset, elset=Set-5, generate
   1,  294,    1
*Orientation, name=Ori-3
1., 0., 0., 0., 1., 0.
1, 0.
** Section: Section_boom  Profile: profile
*Beam Section, elset=boom_2, material=Aluminium_beam, temperature=GRADIENTS, section=CIRC
13.8198
0.,0.,-1.
*End Part
**
*Part, name=boom_mid
*Node
      1,           0.,           0.,           0.
      2,    4.9978466,           0.,           0.
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*Element, type=B31
  1,   1,   2
  2,   2,   3
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*Nset, nset=boom_mid, generate
   1,  287,    1
*Elset, elset=boom_mid, generate
   1,  286,    1
*Nset, nset=boommid, generate
   1,  287,    1
*Elset, elset=boommid, generate
   1,  286,    1
** Section: Section_boom  Profile: profile
*Beam Section, elset=boom_mid, material=Aluminium_beam, temperature=GRADIENTS, section=CIRC
13.8198
0.,0.,-1.
*End Part
**
*Part, name=box
*Node
      1,  -196.843796,  -25.7499161,        1260.
      2,  -196.843796,   25.7499161,        1260.
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*Element, type=S4R
  1,    1,   69, 2661,  122
  2,   69,   70, 2662, 2661
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*Nset, nset=all, generate
     1,  32276,      1
*Elset, elset=all, generate
     1,  33157,      1
** Section: Section_box
*Shell Section, elset=all, material=Aluminium_box
0.0287297, 5
*End Part
**
**
** ASSEMBLY
**
*Assembly, name=Assembly
**
*Instance, name=box-1, part=box
*End Instance
**
*Instance, name=boom_1-1, part=boom_1
          0., 22.9612498805041, 1415.99999984765
          0., 22.9612498805041, 1415.99999984765,           0., 23.961090126834, 1416.01787305116, 90.0000009805755
*End Instance
**
*Instance, name=boom_1-2, part=boom_1
          0., -48.2737498839996, -3.47889908880461e-07
          0., -48.2737498839996, -3.47889908880461e-07,           0., -49.2735901303295, 0.0178728556213938, 90.0000009805755
*End Instance
**
*Instance, name=boom_2-1, part=boom_2
-738.051999963041, 48.2737499975826, 1.35230834530375e-07
-738.051999963041, 48.2737499975826, 1.35230834530375e-07, -738.051999963041, 47.2739097635401, -0.0178730678063052, 74.7164010892807
*End Instance
**
*Instance, name=boom_2-2, part=boom_2
-351.051999906948, -22.9612499939138, 1416.00000034047
-351.051999906948, -22.9612499939138, 1416.00000034047, -351.051999906948, -21.9614097162015, 1415.98212713596, 105.283601380397
*End Instance
**
*Instance, name=boom_mid-1, part=boom_mid
-369.026000289283, 48.2737498052841, -7.0410692387668e-08
-369.026000289283, 48.2737498052841, -7.0410692387668e-08, -369.026000289283, 47.2739095390421, -0.0178732741065248, 82.2198105166874
*End Instance
**
*Instance, name=boom_mid-2, part=boom_mid
-369.026000289283, -48.2737498052841, -7.0410692387668e-08
-369.026000289283, -48.2737498052841, -7.0410692387668e-08, -369.026000289283, -49.2735900715261, 0.01787313328514, 82.2198105166874
*End Instance
**
*Nset, nset=F1, instance=boom_mid-1
 1,
*Nset, nset=F2, instance=box-1
 20,
*Nset, nset=F3, instance=box-1
 18,
*Nset, nset=F4, instance=box-1
 16,
*Nset, nset=F5, instance=box-1
 14,
*Nset, nset=F6, instance=box-1
 12,
*Nset, nset=F7, instance=box-1
 10,
*Nset, nset=F8, instance=box-1
 8,
*Nset, nset=F9, instance=box-1
 6,
*Nset, nset=F10, instance=box-1
 2,
*Nset, nset=F11, instance=boom_mid-1
 287,
*Nset, nset=Set-4, instance=box-1
     2,     3,     6,     8,    10,    12
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*Elset, elset=Set-4, instance=box-1
  2179,  2180,  2181,  2182,  2183,  2184
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*Nset, nset=Set-5, instance=box-1
 26,
*Nset, nset=bc_forces, instance=box-1
    21,    22,    24,    26,    63,    64
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*Elset, elset=bc_forces, instance=box-1
 15110, 15111, 15112, 15113, 15114, 15115
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*Nset, nset=boom1, instance=boom_1-1, generate
   1,  284,    1
*Elset, elset=boom1, instance=boom_1-1, generate
   1,  283,    1
*Nset, nset=surface, instance=box-1
     2,     3,     6,     8,    10,    12
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*Elset, elset=surface, instance=box-1
  2179,  2180,  2181,  2182,  2183,  2184
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*Elset, elset=_m_Surf-1_SPOS, internal, instance=box-1
  2179,  2180,  2181,  2182,  2183,  2184
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*Surface, type=ELEMENT, name=m_Surf-1
_m_Surf-1_SPOS, SPOS
*Elset, elset=_m_Surf-2_SPOS, internal, instance=box-1
 28142, 28143, 28144, 28145, 28146, 28147
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*Surface, type=ELEMENT, name=m_Surf-2
_m_Surf-2_SPOS, SPOS
*Elset, elset=_m_Surf-3_SPOS, internal, instance=box-1
  1639,  1640,  1641,  1642,  1643,  1644
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*Surface, type=ELEMENT, name=m_Surf-3
_m_Surf-3_SPOS, SPOS
*Elset, elset=_m_Surf-4_SPOS, internal, instance=box-1
 29600, 29601, 29602, 29603, 29604, 29605
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*Surface, type=ELEMENT, name=m_Surf-4
_m_Surf-4_SPOS, SPOS
*Surface, type=NODE, name=boom1_CNS_, internal
boom1, 1.
*Surface, type=NODE, name=boom_2-1_boom_2_CNS_, internal
boom_2-1.boom_2, 1.
*Surface, type=NODE, name=boom_2-2_boom_2_CNS_, internal
boom_2-2.boom_2, 1.
*Surface, type=NODE, name=boom_1-2_boom1_CNS_, internal
boom_1-2.boom1, 1.
*Surface, type=NODE, name=boom_1-1_boom1_CNS_, internal
boom_1-1.boom1, 1.
*Surface, type=NODE, name=boom_mid-1_boom_mid_CNS_, internal
boom_mid-1.boom_mid, 1.
*Surface, type=NODE, name=boom_mid-2_boom_mid_CNS_, internal
boom_mid-2.boom_mid, 1.
** Constraint: Constraint-1
*Tie, name=Constraint-1, adjust=yes
boom1_CNS_, m_Surf-1
** Constraint: Constraint-2
*Tie, name=Constraint-2, adjust=yes
boom_2-1_boom_2_CNS_, m_Surf-1
** Constraint: Constraint-3
*Tie, name=Constraint-3, adjust=yes
boom_2-2_boom_2_CNS_, m_Surf-2
** Constraint: Constraint-4
*Tie, name=Constraint-4, adjust=yes
boom_2-1_boom_2_CNS_, m_Surf-2
** Constraint: Constraint-5
*Tie, name=Constraint-5, adjust=yes
boom_2-2_boom_2_CNS_, m_Surf-3
** Constraint: Constraint-6
*Tie, name=Constraint-6, adjust=yes
boom_1-2_boom1_CNS_, m_Surf-3
** Constraint: Constraint-7
*Tie, name=Constraint-7, adjust=yes
boom_1-2_boom1_CNS_, m_Surf-4
** Constraint: Constraint-8
*Tie, name=Constraint-8, adjust=yes
boom_1-1_boom1_CNS_, m_Surf-4
** Constraint: Constraint-9
*Tie, name=Constraint-9, adjust=yes
boom_mid-1_boom_mid_CNS_, m_Surf-1
** Constraint: Constraint-10
*Tie, name=Constraint-10, adjust=yes
boom_mid-2_boom_mid_CNS_, m_Surf-3
*End Assembly
**
** MATERIALS
**
*Material, name=Aluminium_beam
*Elastic
200000., 0.29
*Material, name=Aluminium_box
*Elastic
210000., 0.3
** ----------------------------------------------------------------
**
** STEP: loading
**
*Step, name=loading, nlgeom=NO
load
*Static
1., 1., 1e-05, 1.
**
** BOUNDARY CONDITIONS
**
** Name: BC-1 Type: Displacement/Rotation
*Boundary
bc_forces, 1, 1
bc_forces, 2, 2
bc_forces, 3, 3
bc_forces, 4, 4
bc_forces, 5, 5
bc_forces, 6, 6
**
** LOADS
**
** Name: F1   Type: Concentrated force
*Cload
F1, 2, 209.974
** Name: F2   Type: Concentrated force
*Cload
F2, 2, 202.063
** Name: F3   Type: Concentrated force
*Cload
F3, 2, 192.695
** Name: F4   Type: Concentrated force
*Cload
F4, 2, 181.773
** Name: F5   Type: Concentrated force
*Cload
F5, 2, 169.132
** Name: F6   Type: Concentrated force
*Cload
F6, 2, 154.497
** Name: F7   Type: Concentrated force
*Cload
F7, 2, 137.405
** Name: F8   Type: Concentrated force
*Cload
F8, 2, 116.983
** Name: F9   Type: Concentrated force
*Cload
F9, 2, 91.2045
** Name: F10   Type: Concentrated force
*Cload
F10, 2, 48.557
** Name: F11   Type: Concentrated force
*Cload
F11, 2, 10.2505
**
** OUTPUT REQUESTS
**
*Restart, write, frequency=0
**
** FIELD OUTPUT: F-Output-1
**
*Output, field, variable=PRESELECT
**
** HISTORY OUTPUT: H-Output-1
**
*Output, history, variable=PRESELECT
*End Step
